// COMSOL Multiphysics 6.2.0.339 model "1_entry_flow_model_file.mph"
// Outline of the model tree

Parameters
  Re = 1
  De = 1
  beta = 0.5
  slip_number = 0.01
  epsilon = 0.01
  r_c = 1 [mm]
  L_u = 25*r_c
  L_d = 25*r_c
  density = 1000 [kg/m^3]
  mu_0 = 0.01 [Pa*s]
  u_in = Re*mu_0/(density*r_c)
  mu_s = beta*mu_0
  mu_p = (1-beta)*mu_0
  lambda = r_c*De/u_in
  slip_length = slip_number*r_c

Geometry
  geom1 "Geometry 1" (2D axisymmetric, length unit mm)
    r1: Rectangle | pos = {0.9*r_c, -L_d}; size = {0.1*r_c, L_d}
    r2: Rectangle | pos = {0, -L_d}; size = {0.9*r_c, L_d}
    r3: Rectangle | pos = {0.9*r_c, 0}; size = {0.1*r_c, L_u}
    r4: Rectangle | size = {0.9*r_c, L_u}
    r5: Rectangle | pos = {0.9*r_c, L_u}; size = {0.1*r_c, L_u}
    r6: Rectangle | pos = {0, L_u}; size = {0.9*r_c, L_u}
    r7: Rectangle | pos = {0.9*r_c, 2*L_u}; size = {0.1*r_c, L_u}
    r8: Rectangle | pos = {0, 2*L_u}; size = {0.9*r_c, L_u}
    r9: Rectangle | pos = {0.9*r_c, 3*L_u}; size = {0.1*r_c, L_u}
    r10: Rectangle | pos = {0, 3*L_u}; size = {0.9*r_c, L_u}
    r11: Rectangle | pos = {0.9*r_c, 4*L_u}; size = {0.1*r_c, L_u}
    r12: Rectangle | pos = {0, 4*L_u}; size = {0.9*r_c, L_u}
    r13: Rectangle (disabled) | pos = {0.9*r_c, 5*L_u}; size = {0.1*r_c, L_u}
    r14: Rectangle (disabled) | pos = {0, 5*L_u}; size = {0.9*r_c, L_u}
    fin: Finalize "Form Union"

Physics
  vef: ViscoelasticFlow on all domains
    dependent variable u = {u, v, w}
    fp1: FluidProperties (default)
      rho_mat = userdef
      rho = density
      MaterialModelViscoelastic = EPTT
      mueLPTT = mu_p
      lambdaeLPTT = lambda
      epsiloneLPTT = epsilon
      mu_s_mat = userdef
      mu_s = mu_s
    init1: init "Initial Values 1" (default)
    axi1: AxialSymmetry (default)
    wallbc1: WallBC "Wall 1" (default) | BoundaryCondition = NavierSlip; NavierSlip = userdef; beta = slip_length
    inl1: InletBoundary "Inlet 1" on boundaries 2, 15 | ComponentWise = VelocityFieldComponentWise; u0 = {0, 0, u_in}
    out1: OutletBoundary "Outlet 1" on boundaries 13, 26 | NormalFlow = 1; SuppressBackflow = 0
    prpc1: PressurePointConstraint on points 21
    sym1: Symmetry on boundaries 27

Mesh
  mesh3 "(dr, dz) = (0.01, 0.02)"
    size: MeshSizeDefault | hmax = 10.1; hmin = 0.045; hcurve = 0.3; hgrad = 1.3
    map1: Map "Mapped 1" on remaining entities
      dis1: Distribution "radial wall" on boundaries 15, 17, 19, 21, 23, 25, 26 | numelem = 10; equidistant = on
      dis2: Distribution "radial core" on boundaries 2, 4, 6, 8, 10, 12, 13
        type = predefined
        elemcount = 36
        elemratio = 5
        growthrate = exponential
      dis4: Distribution "axial downstream 1" on boundaries 3, 16, 28
        type = predefined
        elemcount = 320
        elemratio = 10
        growthrate = exponential
      dis3: Distribution "axial downstream 2" on boundaries 5, 18, 29
        type = predefined
        elemcount = 32
        elemratio = 10
        growthrate = exponential
      dis5: Distribution "axial downstream 3" on boundaries 7, 20, 30
        type = predefined
        elemcount = 10
        elemratio = 1.4
        growthrate = exponential
      dis7: Distribution "axial downstream 4, 5, 6" on boundaries 9, 11, 22, 24, 31, 32 | numelem = 10; equidistant = on
      dis6: Distribution "axial upstream" on boundaries 1, 14, 27
        type = predefined
        reverse = on
        elemcount = 197
        elemratio = 20
        growthrate = exponential
  mesh4 "(dr, dz) = (0.005, 0.01)"
    size: MeshSizeDefault | hmax = 10.1; hmin = 0.045; hcurve = 0.3; hgrad = 1.3
    map1: Map "Mapped 1" on remaining entities
      dis1: Distribution "radial wall" on boundaries 15, 17, 19, 21, 23, 25, 26 | numelem = 20; equidistant = on
      dis2: Distribution "radial core" on boundaries 2, 4, 6, 8, 10, 12, 13
        type = predefined
        elemcount = 72
        elemratio = 5
        growthrate = exponential
      dis4: Distribution "axial downstream 1" on boundaries 3, 16, 28
        type = predefined
        elemcount = 640
        elemratio = 10
        growthrate = exponential
      dis3: Distribution "axial downstream 2" on boundaries 5, 18, 29
        type = predefined
        elemcount = 48
        elemratio = 15
        growthrate = exponential
      dis5: Distribution "axial downstream 3" on boundaries 7, 20, 30
        type = predefined
        elemcount = 14
        elemratio = 1.4
        growthrate = exponential
      dis7: Distribution "axial downstream 4" on boundaries 9, 11, 22, 24, 31, 32 | numelem = 14; equidistant = on
      dis6: Distribution "axial upstream" on boundaries 1, 14, 27
        type = predefined
        reverse = on
        elemcount = 293
        elemratio = 30
        growthrate = exponential
  mesh5 "(dr, dz) = (0.0025, 0.005)"
    size: MeshSizeDefault | hmax = 10.1; hmin = 0.045; hcurve = 0.3; hgrad = 1.3
    map1: Map "Mapped 1" on remaining entities
      dis1: Distribution "radial wall" on boundaries 15, 17, 19, 21, 23 | numelem = 40; equidistant = on
      dis2: Distribution "radial core" on boundaries 2, 4, 6, 8, 10
        type = predefined
        elemcount = 145
        elemratio = 5
        growthrate = exponential
      dis4: Distribution "axial downstream 1" on boundaries 3, 16, 28
        type = predefined
        elemcount = 1279
        elemratio = 10
        growthrate = exponential
      dis3: Distribution "axial downstream 2" on boundaries 5, 18, 29
        type = predefined
        elemcount = 96
        elemratio = 15
        growthrate = exponential
      dis5: Distribution "axial downstream 3" on boundaries 7, 20, 30
        type = predefined
        elemcount = 28
        elemratio = 1.4
        growthrate = exponential
      dis7: Distribution "axial downstream 4, 5, 6" on boundaries 9, 11, 22, 24, 31, 32 | numelem = 28
      dis6: Distribution "axial upstream" on boundaries 1, 14, 27
        type = predefined
        reverse = on
        elemcount = 586
        elemratio = 30
        growthrate = exponential

Studies
  std2 "(dr, dz) = (0.005, 0.01)"
    stat: Stationary
      useinitsol = on
      initmethod = sol
      initstudy = zero
      usesol = on
      notstudy = zero
      mesh = {geom1, mesh4}
      useparam = on
      pname = De
      plistarr = 0.1, 0.5, 1, 1.5, 2, 2.5, 3, 3.5, 4, 4.5, 5, 5.5, 6, 6.5, 7, 7.5, 8, 8.5, 9, 9.5, 10
      pcontinuationmode = manual

Solver configurations
  sol3 "Solution 3" (study std2)
    v1: Variables "Dependent Variables 1"
    s1: Stationary "Stationary Solver 1" | stol = 0.000001
      p1: Parametric
      fc1: FullyCoupled | linsolver = d1; initstep = 0.01; maxiter = 100
      d1: Direct "Direct, fluid flow variables (vef)" | pivotperturb = 1.0E-13

Datasets
  dset3: Solution | solution = sol3
  rev2: Revolve2D "Revolution 2D 1" | data = dset3; startangle = -90; revangle = 225